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/COM,ANSYS RELEASE Release 16.0      BUILD 16.0      UP20141203       19:20:50
/PREP7
/TITLE,unsaved_project--Static Structural (A5)
ANTYPE, 0
EQSLV,PCG , 1.000000000E-08,,
TOFFST,  273.150000
DMPOPT,ESAV,NO
DMPOPT,EMAT,NO
*IF,_CDRDOFF,EQ,1,THEN     !if solid model was read in
_CDRDOFF=             !reset flag, numoffs already performed
*ELSE              !offset database for the following FE model
NUMOFF,NODE,     4008
NUMOFF,ELEM,     3211
NUMOFF,MAT ,        1
NUMOFF,REAL,        1
NUMOFF,TYPE,      100
NUMOFF,CSYS,       12
*ENDIF
*SET,LM      ,'                                '
*SET,_ASMDIAG,  4122.572416379
*SET,_DS_PROGRESS,  999.0000000000
*DIM,_LOADVARI33X,TABLE,       2,       1,       1,TIME    ,        ,
*PREAD,_LOADVARI33X,         4
 0.7888609052210E-30  0.000000000000      1.000000000000     0.7888609052210E-30
END PREAD
*DIM,_LOADVARI33Y,TABLE,       2,       1,       1,TIME    ,        ,
*PREAD,_LOADVARI33Y,         4
 0.7888609052210E-30  0.000000000000      1.000000000000     0.7888609052210E-30
END PREAD
*DIM,_LOADVARI33Z,TABLE,       2,       1,       1,TIME    ,        ,
*PREAD,_LOADVARI33Z,         6
 0.7888609052210E-30  0.000000000000      1.000000000000     0.7888609052210E-30
  0.000000000000     0.9999999999997E-03
END PREAD
*SET,_MAXELEMNUM,  2117.000000000
*SET,_MAXELEMTYPE,  2.000000000000
*SET,_MAXNODENUM,  4008.000000000
*SET,_MAXREALCONST,  1.000000000000
*SET,_NUMELEM,  2117.000000000
*SET,_NUMNODE,  4008.000000000
*SET,_RETURN ,  0.000000000000
*SET,_STATUS ,  0.000000000000
*SET,_WALLBSOL,  19.34722222222
*SET,_WALLSTRT,  19.34722222222
*SET,_WB_PROJECTSCRATCH_DIR(1,       1,       1),'C:\Users\wito\AppData\Local\Temp\WB_MYPC_wito_1996_2\_ProjectScratch\ScrC338\                                                                                                                                                                           '
*SET,_WB_SOLVERFILES_DIR(1,       1,       1),'C:\Users\wito\AppData\Local\Temp\WB_MYPC_wito_1996_2\unsaved_project_files\dp0\SYS\MECH\                                                                                                                                                                '
*SET,_WB_USERFILES_DIR(1,       1,       1),'C:\Users\wito\AppData\Local\Temp\WB_MYPC_wito_1996_2\unsaved_project_files\user_files\                                                                                                                                                                  '
*SET,_XMAX   ,  1000.000000000
*SET,_XMIN   , -999.7040942000
*SET,_YMAX   ,  1999.898628000
*SET,_YMIN   , -999.5984503000
*SET,_ZMAX   ,  1000.000000000
*SET,_ZMIN   , -999.9510347000
DOF,DELETE
ET,       1,187
ET,       2,154
KEYOP,       2, 2,        1
KEYOP,       2, 7,        1
KEYOP,       2,11,        2
ET,     100,174
RLBLOCK,       1,       1,       6,       7
(2i8,6g16.9)
(7g16.9)
       1       6  0.00000000      0.00000000      0.00000000      0.00000000      0.00000000      0.00000000
LOCAL,R5.0,LOC,      12, 0,  0.00000000    ,  0.00000000    ,  0.00000000
LOCAL,R5.0,ANG,      12, 0,  0.00000000    ,  0.00000000    ,  0.00000000
LOCAL,R5.0,PRM,      12, 0,  1.00000000    ,  1.00000000
CSCIR,      12,       0,       0
CSYS,   0
TYPE,      100
NBLOCK,6,SOLID,      4008,      2188
(3i9,6e20.13)
        1        0        0 8.6602540380000E+02 5.0000000000000E+02
        2        0        0 1.0000000000000E+03
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N,R5.3,LOC,       -1,
EBLOCK,19,SOLID,      3211,      1094
(19i9)
        1      100        1        1        0        0        0       -1        8        0     2118       27       26      547      547      904      907      547      916
        1      100        1        1        0        0        0       -2        8        0     2119      248      214      227      227     1972     1970      227     2027
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       -1
CMBLOCK,_DISPZEROUX,NODE,      30  ! users node component definition
(8i10)
         8         9        10        11        12        13        14        15
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CMBLOCK,_DISPZEROUY,NODE,      30  ! users node component definition
(8i10)
         8         9        10        11        12        13        14        15
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CMBLOCK,_DISPZEROUZ,NODE,      30  ! users node component definition
(8i10)
         8         9        10        11        12        13        14        15
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MPTEMP,R5.0, 1, 1,  0.00000000    ,
MPDATA,R5.0, 1,EX  ,       1, 1,  200000.000    ,
MPTEMP,R5.0, 1, 1,  0.00000000    ,
MPDATA,R5.0, 1,NUXY,       1, 1, 0.300000000    ,
MPTEMP,R5.0, 1, 1,  0.00000000    ,
MPDATA,R5.0, 1,ALPX,       1, 1, 1.200000000E-05,
MPTEMP,R5.0, 1, 1,  0.00000000    ,
MPDATA,R5.0, 1,DENS,       1, 1, 7.850000000E-09,
MPTEMP,R5.0, 1, 1,  0.00000000    ,
MPDATA,R5.0, 1,KXX ,       1, 1,  60.5000000    ,
MPTEMP,R5.0, 1, 1,  0.00000000    ,
MPDATA,R5.0, 1,RSVX,       1, 1, 1.700000000E-04,
MPTEMP,R5.0, 1, 1,  0.00000000    ,
MPDATA,R5.0, 1,C   ,       1, 1,  434000000.    ,
MPTEMP,R5.0, 1, 1,  0.00000000    ,
MPDATA,R5.0, 1,MURX,       1, 1,  10000.0000    ,
EXTOPT,ATTR,      0,      0,      0
EXTOPT,ESIZE,  0,  0.0000
EXTOPT,ACLEAR,      0
TREF,  22.0000000
IRLF,  0
BFUNIF,TEMP,_TINY
ACEL,  0.00000000    ,  0.00000000    ,  0.00000000
OMEGA,  0.00000000    ,  0.00000000    ,  0.00000000
DOMEGA,  0.00000000    ,  0.00000000    ,  0.00000000
CGLOC,  0.00000000    ,  0.00000000    ,  0.00000000
CGOMEGA,  0.00000000    ,  0.00000000    ,  0.00000000
DCGOMG,  0.00000000    ,  0.00000000    ,  0.00000000

NSUBST,         1,         1,         1,
KUSE,     0
TIME,  1.00000000
ALPHAD,  0.00000000
BETAD,  0.00000000
DMPRAT,  0.00000000
DMPSTR,  0.00000000

CRPLIM, 0.100000000    ,   0
CRPLIM,  0.00000000    ,   1
NCNV,     1,  0.00000000    ,     0,  0.00000000    ,  0.00000000

NEQIT,     0

ERESX,DEFA
OUTRES, ALL,NONE,
OUTRES,NSOL, ALL,
OUTRES,RSOL, ALL,
OUTRES,STRS, ALL,
OUTRES,EPEL, ALL,
OUTRES,EPPL, ALL,

D,      8,UX  ,  0.00000000    ,  0.00000000
D,      8,UY  ,  0.00000000    ,  0.00000000
D,      8,UZ  ,  0.00000000    ,  0.00000000
D,      9,UX  ,  0.00000000    ,  0.00000000
D,      9,UY  ,  0.00000000    ,  0.00000000
D,      9,UZ  ,  0.00000000    ,  0.00000000
D,     10,UX  ,  0.00000000    ,  0.00000000
D,     10,UY  ,  0.00000000    ,  0.00000000
D,     10,UZ  ,  0.00000000    ,  0.00000000
D,     11,UX  ,  0.00000000    ,  0.00000000
D,     11,UY  ,  0.00000000    ,  0.00000000
D,     11,UZ  ,  0.00000000    ,  0.00000000
D,     12,UX  ,  0.00000000    ,  0.00000000
D,     12,UY  ,  0.00000000    ,  0.00000000
D,     12,UZ  ,  0.00000000    ,  0.00000000
D,     13,UX  ,  0.00000000    ,  0.00000000
D,     13,UY  ,  0.00000000    ,  0.00000000
D,     13,UZ  ,  0.00000000    ,  0.00000000
D,     14,UX  ,  0.00000000    ,  0.00000000
D,     14,UY  ,  0.00000000    ,  0.00000000
D,     14,UZ  ,  0.00000000    ,  0.00000000
D,     15,UX  ,  0.00000000    ,  0.00000000
D,     15,UY  ,  0.00000000    ,  0.00000000
D,     15,UZ  ,  0.00000000    ,  0.00000000
D,     16,UX  ,  0.00000000    ,  0.00000000
D,     16,UY  ,  0.00000000    ,  0.00000000
D,     16,UZ  ,  0.00000000    ,  0.00000000
D,     48,UX  ,  0.00000000    ,  0.00000000
D,     48,UY  ,  0.00000000    ,  0.00000000
D,     48,UZ  ,  0.00000000    ,  0.00000000
D,     49,UX  ,  0.00000000    ,  0.00000000
D,     49,UY  ,  0.00000000    ,  0.00000000
D,     49,UZ  ,  0.00000000    ,  0.00000000
D,    746,UX  ,  0.00000000    ,  0.00000000
D,    746,UY  ,  0.00000000    ,  0.00000000
D,    746,UZ  ,  0.00000000    ,  0.00000000
D,    747,UX  ,  0.00000000    ,  0.00000000
D,    747,UY  ,  0.00000000    ,  0.00000000
D,    747,UZ  ,  0.00000000    ,  0.00000000
D,    748,UX  ,  0.00000000    ,  0.00000000
D,    748,UY  ,  0.00000000    ,  0.00000000
D,    748,UZ  ,  0.00000000    ,  0.00000000
D,    749,UX  ,  0.00000000    ,  0.00000000
D,    749,UY  ,  0.00000000    ,  0.00000000
D,    749,UZ  ,  0.00000000    ,  0.00000000
D,    750,UX  ,  0.00000000    ,  0.00000000
D,    750,UY  ,  0.00000000    ,  0.00000000
D,    750,UZ  ,  0.00000000    ,  0.00000000
D,    761,UX  ,  0.00000000    ,  0.00000000
D,    761,UY  ,  0.00000000    ,  0.00000000
D,    761,UZ  ,  0.00000000    ,  0.00000000
D,    762,UX  ,  0.00000000    ,  0.00000000
D,    762,UY  ,  0.00000000    ,  0.00000000
D,    762,UZ  ,  0.00000000    ,  0.00000000
D,    766,UX  ,  0.00000000    ,  0.00000000
D,    766,UY  ,  0.00000000    ,  0.00000000
D,    766,UZ  ,  0.00000000    ,  0.00000000
D,    767,UX  ,  0.00000000    ,  0.00000000
D,    767,UY  ,  0.00000000    ,  0.00000000
D,    767,UZ  ,  0.00000000    ,  0.00000000
D,    768,UX  ,  0.00000000    ,  0.00000000
D,    768,UY  ,  0.00000000    ,  0.00000000
D,    768,UZ  ,  0.00000000    ,  0.00000000
D,    777,UX  ,  0.00000000    ,  0.00000000
D,    777,UY  ,  0.00000000    ,  0.00000000
D,    777,UZ  ,  0.00000000    ,  0.00000000
D,    778,UX  ,  0.00000000    ,  0.00000000
D,    778,UY  ,  0.00000000    ,  0.00000000
D,    778,UZ  ,  0.00000000    ,  0.00000000
D,    779,UX  ,  0.00000000    ,  0.00000000
D,    779,UY  ,  0.00000000    ,  0.00000000
D,    779,UZ  ,  0.00000000    ,  0.00000000
D,    782,UX  ,  0.00000000    ,  0.00000000
D,    782,UY  ,  0.00000000    ,  0.00000000
D,    782,UZ  ,  0.00000000    ,  0.00000000
D,    794,UX  ,  0.00000000    ,  0.00000000
D,    794,UY  ,  0.00000000    ,  0.00000000
D,    794,UZ  ,  0.00000000    ,  0.00000000
D,    795,UX  ,  0.00000000    ,  0.00000000
D,    795,UY  ,  0.00000000    ,  0.00000000
D,    795,UZ  ,  0.00000000    ,  0.00000000
D,    806,UX  ,  0.00000000    ,  0.00000000
D,    806,UY  ,  0.00000000    ,  0.00000000
D,    806,UZ  ,  0.00000000    ,  0.00000000
D,    813,UX  ,  0.00000000    ,  0.00000000
D,    813,UY  ,  0.00000000    ,  0.00000000
D,    813,UZ  ,  0.00000000    ,  0.00000000
D,   1073,UX  ,  0.00000000    ,  0.00000000
D,   1073,UY  ,  0.00000000    ,  0.00000000
D,   1073,UZ  ,  0.00000000    ,  0.00000000
FINISH
